<Lems>

    <!--

        This LEMS file has been automatically generated using PyNeuroML v0.7.1 (libNeuroML v0.4.0)

     -->

    <!-- Specify which component to run -->
    <Target component="pyr_single_comp_ca"/>

    <!-- Include core NeuroML2 ComponentType definitions -->
    <Include file="Cells.xml"/>
    <Include file="Networks.xml"/>
    <Include file="Simulation.xml"/>

    <Include file="pyr_example_ca_net.nml"/>
    <Include file="pyr_ca_cell.nml"/>
    <Include file="../pas.channel.nml"/>
    <Include file="../cad.nml"/>
    <Include file="../sca.channel.nml"/>
    <Include file="../kca.channel.nml"/>

    <Simulation id="pyr_single_comp_ca" length="700ms" step="0.005ms" target="single_pyr_cell_network" seed="123">  <!-- Note seed: ensures same random numbers used every run -->

        <OutputFile id="output0" fileName="pyr_single_comp_ca.dat">
            <OutputColumn id="pop0[0]_v" quantity="pop0[0]/v"/>
        </OutputFile>

        <!-- <OutputFile id="cai" fileName="pyr_single_comp_ca.cai.dat">
            <OutputColumn id="pop0[0]_cai" quantity="pop0[0]/caConc"/>
        </OutputFile> -->

        <!-- <OutputFile id="ica" fileName="pyr_single_comp_ca.ica.dat">
            <OutputColumn id="pop0[0]_ica" quantity="pop0[0]/iCa"/>
        </OutputFile> -->

        <!-- <OutputFile id="sca_eca" fileName="pyr_single_comp_ca.sca_eca.dat">
            <OutputColumn id="pop0[0]_sca_eca" quantity="pop0[0]/pyr_b_prop/membraneProperties/soma_sca/erev"/>
        </OutputFile> -->

        <OutputFile id="sca_m" fileName="pyr_single_comp_ca.sca_m.dat">
            <OutputColumn id="pop0[0]_sca_m" quantity="pop0[0]/pyr_b_prop/membraneProperties/soma_sca/sca/m/q"/>
        </OutputFile>

        <OutputFile id="sca_h" fileName="pyr_single_comp_ca.sca_h.dat">
            <OutputColumn id="pop0[0]_sca_h" quantity="pop0[0]/pyr_b_prop/membraneProperties/soma_sca/sca/h/q"/>
        </OutputFile>

        <OutputFile id="kca_n" fileName="pyr_single_comp_ca.kca_n.dat">
            <OutputColumn id="pop0[0]_kca_n" quantity="pop0[0]/pyr_b_prop/membraneProperties/soma_kca/kca/n/q"/>
        </OutputFile>

    </Simulation>

</Lems>
